** written by FreeCAD inp file writer for CalculiX,Abaqus meshes
** highest dimension mesh elements only.

** Nodes
*Node, NSET=Nall
1, 0, 1.5, 0
2, 0, 1.5, 0.5
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

** Volume elements
*Element, TYPE=C3D8, ELSET=Evolumes
1, 3, 4, 1, 2, 7, 8, 5, 6
2, 10, 3, 2, 9, 12, 7, 6, 11
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
** Define element set Eall
*ELSET, ELSET=Eall
Evolumes


***********************************************************
** Element sets for materials and FEM element type (solid, shell, beam, fluid)
*ELSET,ELSET=MechanicalMaterialSolid
Evolumes

***********************************************************
** constraints fixed node sets
** ConstraintFixed
*NSET,NSET=ConstraintFixed
1,
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
***********************************************************
** Materials
** see information about units at file end
** FreeCAD material name: CalculiX-Steel
** MechanicalMaterial
*MATERIAL, NAME=MechanicalMaterial
*ELASTIC
210000,0.3

***********************************************************
** Sections
*SOLID SECTION, ELSET=MechanicalMaterialSolid, MATERIAL=MechanicalMaterial

***********************************************************
** At least one step is needed to run an CalculiX analysis of FreeCAD
*STEP
*BUCKLE
10


***********************************************************
** Fixed Constraints
** ConstraintFixed
*BOUNDARY
ConstraintFixed,1
ConstraintFixed,2
ConstraintFixed,3


***********************************************************
** constraints force node loads
*CLOAD
** ConstraintForce
** node loads on shape: Beam:Face6
65,3,-3.2812500000000E-01
66,3,-6.5625000000000E-01
67,3,-6.5625000000000E-01
68,3,-1.3125000000000E+00
101,3,-6.5625000000000E-01
102,3,-1.3125000000000E+00
135,3,-6.5625000000000E-01
136,3,-1.3125000000000E+00
169,3,-3.2812500000000E-01
170,3,-6.5625000000000E-01
203,3,-6.5625000000000E-01
204,3,-1.3125000000000E+00
221,3,-1.3125000000000E+00
238,3,-1.3125000000000E+00
255,3,-6.5625000000000E-01
288,3,-6.5625000000000E-01
289,3,-1.3125000000000E+00
306,3,-1.3125000000000E+00
323,3,-1.3125000000000E+00
340,3,-6.5625000000000E-01
373,3,-3.2812500000000E-01
374,3,-6.5625000000000E-01
391,3,-6.5625000000000E-01
408,3,-6.5625000000000E-01
425,3,-3.2812500000000E-01


***********************************************************
** Outputs --> frd file
*NODE FILE
U
*EL FILE
S, E
** outputs --> dat file
** reaction forces for Constraint fixed
*NODE PRINT, NSET=ConstraintFixed, TOTALS=ONLY
RF


***********************************************************
*END STEP

***********************************************************
** CalculiX Input file
**   written by    --> FreeCAD 0.20.25065 (Git)
**   written on    --> Tue Jun 15 10:36:32 2021
**   file name     --> ccx_buckling_flexuralbuckling.FCStd
**   analysis name --> Analysis
**
**
***********************************************************
**  About units:
**  See ccx manual, ccx does not know about any unit.
**  Golden rule: The user must make sure that the numbers he provides have consistent units.
**  The user is the FreeCAD calculix writer module ;-)
**
**  The unit system which is used at Guido Dhondt's company: mm, N, s, K
**  Since Length and Mass are connected by Force, if Length is mm the Mass is in t to get N
**  The following units are used to write to inp file:
**
**  Length: mm (this includes the mesh geometry)
**  Mass: t
**  TimeSpan: s
**  Temperature: K
**
**  This leads to:
**  Force: N
**  Pressure: N/mm^2 == MPa (Young's Modulus has unit Pressure)
**  Density: t/mm^3
**  Gravity: mm/s^2
**  Thermal conductivity: t*mm/K/s^3 == as W/m/K == kW/mm/K
**  Specific Heat: mm^2/s^2/K = J/kg/K == kJ/t/K
**
