*Node, NSET=Nall
1, 0, 0, 0
2, 0, 0, 10
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*Element, TYPE=C3D10, ELSET=Eall
633, 95, 98, 47, 196, 103, 197, 198, 200, 199, 201,
634, 147, 121, 145, 196, 203, 202, 161, 205, 204, 206,
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

***********************************************************
** Element sets for materials and FEM element type (solid, shell, beam)
** written by write_element_sets_material_and_femelement_type function
*ELSET,ELSET=MechanicalMaterialSolid
Eall

***********************************************************
** Node set for fixed constraint
** written by write_node_sets_constraints_fixed function
*NSET,NSET=FemConstraintFixed
1,
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
***********************************************************
** Node sets for prescribed displacement constraint
** written by write_displacement_nodes function

***********************************************************
** Node sets for loads
** written by write_node_sets_constraints_force function
** no point load on vertices --> no set for node loads

***********************************************************
** Materials
** written by write_materials function
** Young's modulus unit is MPa = N/mm2
**FreeCAD material name: Steel
*MATERIAL, NAME=MechanicalMaterial
*ELASTIC
200000 ,  0.300
*DENSITY
7.900e-09,

***********************************************************
** Sections
** written by write_femelementsets function
*SOLID SECTION, ELSET=MechanicalMaterialSolid, MATERIAL=MechanicalMaterial

***********************************************************
** One step is needed to calculate the mechanical analysis of FreeCAD
** loads are applied quasi-static, means without involving the time dimension
** written by write_step_begin function
*STEP
*STATIC

***********************************************************
** Constaints
** written by write_constraints_fixed function
*BOUNDARY
FemConstraintFixed,1
FemConstraintFixed,2
FemConstraintFixed,3


***********************************************************
** Displacement constraint applied
** written by write_displacement function


***********************************************************
** Node loads
** written by write_constraints_force function
*CLOAD
** FemConstraintForce
** node loads on element Face: Box:Face2
5,3,-0.0000000000000E+00
6,3,-0.0000000000000E+00
7,3,-0.0000000000000E+00
8,3,-0.0000000000000E+00
21,3,-0.0000000000000E+00
22,3,-2.0833333333333E-01
23,3,-2.0833333333333E-01
24,3,-0.0000000000000E+00
25,3,-2.0833333333333E-01
26,3,-2.0833333333333E-01
27,3,-0.0000000000000E+00
28,3,-2.0833333333333E-01
29,3,-2.0833333333333E-01
30,3,-0.0000000000000E+00
31,3,-2.0833333333333E-01
32,3,-2.0833333333333E-01
70,3,-0.0000000000000E+00
71,3,-0.0000000000000E+00
72,3,-0.0000000000000E+00
73,3,-0.0000000000000E+00
74,3,-0.0000000000000E+00
75,3,-4.1666666666667E-01
76,3,-4.1666666666667E-01
77,3,-4.1666666666667E-01
78,3,-4.1666666666667E-01
79,3,-4.1666666666667E-01
80,3,-4.1666666666667E-01
81,3,-4.1666666666667E-01
82,3,-4.1666666666667E-01
83,3,-4.1666666666667E-01
84,3,-4.1666666666667E-01
85,3,-4.1666666666667E-01
86,3,-4.1666666666667E-01
87,3,-4.1666666666667E-01
88,3,-4.1666666666667E-01
89,3,-4.1666666666667E-01
90,3,-4.1666666666667E-01
91,3,-4.1666666666667E-01
92,3,-4.1666666666667E-01
93,3,-4.1666666666667E-01
94,3,-4.1666666666667E-01


***********************************************************
** Element + CalculiX face + load in [MPa]
** written by write_constraints_pressure function
*DLOAD
** Load on face Face2
635,P1,-10.0
638,P3,-10.0
641,P2,-10.0
668,P1,-10.0
670,P1,-10.0
688,P1,-10.0
693,P3,-10.0
699,P2,-10.0
700,P3,-10.0
707,P2,-10.0
708,P4,-10.0
710,P4,-10.0
711,P2,-10.0
722,P3,-10.0
737,P3,-10.0
757,P3,-10.0

***********************************************************
** Outputs --> frd file
** written by write_outputs_types function
*NODE FILE
U
*EL FILE
S, E
** outputs --> dat file
*NODE PRINT , NSET=Nall
U
*EL PRINT , ELSET=Eall
S

***********************************************************
** written by write_step_end function
*END STEP

***********************************************************
** CalculiX Input file
** written by write_footer function
**   written by    --> FreeCAD 0.16.5838 +1 (Git)
**   written on    --> Mon Oct 26 18:28:42 2015
**   file name     -->
**   analysis name --> MechanicalAnalysis
**
**
**
**   Units
**
**   Geometry (mesh data)        --> mm
**   Materials (Young's modulus) --> N/mm2 = MPa
**   Loads (nodal loads)         --> N
**
